/**
 * \file
 * \copyright
 * Copyright (c) 2012-2023, OpenGeoSys Community (http://www.opengeosys.org)
 *            Distributed under a Modified BSD License.
 *              See accompanying file LICENSE.txt or
 *              http://www.opengeosys.org/project/license
 */
// Metadata
@Author Mehran Ghasabeh and Thomas Nagel;
@Date 15 / 11 / 2023;
@Description{Shear Test applying the Hoek - Brown Failure Criterion Model};
@MaximumNumberOfSubSteps 10; // fails without substepping (residual ping-pong)
@Behaviour<generic> './src/libBehaviour.so' 'HoekBrownC2';

//@Behaviour<generic> 'lib/libOgsMFrontBehaviour' 'HoekBrownC2';

@Real 'Ec' 10e3;
@Real 'nu' 0.2;
@Real 'sc' 30.;
@Real 'mb' 4.3;
@Real 'sb' 2e-2;
@Real 'em' 5e-3;
@Real 'tmax' 1.;

// parameters for the yield surface
@MaterialProperty<constant> 'YoungModulus' 'Ec';
@MaterialProperty<constant> 'PoissonRatio' 'nu';
@MaterialProperty<constant> 'UniaxialCompressiveStrengthF' 'sc';
@MaterialProperty<constant> 'CurveFittingParameterF' 'mb';
@MaterialProperty<constant> 'ExponentF' 0.502;
@MaterialProperty<constant> 'EstimatedParameterF' 'sb';
@MaterialProperty<constant> 'InitialJ2' 1e-8;
@MaterialProperty<constant> 'J2TOL' 1e-6;
@MaterialProperty<constant> 'TransitionAngle' 28;

// parameters for the plastic potential
@MaterialProperty<constant> 'UniaxialCompressiveStrengthG' 'sc';
@MaterialProperty<constant> 'CurveFittingParameterG' 0.05;
@MaterialProperty<constant> 'ExponentG' 0.5;
@MaterialProperty<constant> 'EstimatedParameterG' 1.;

@ExternalStateVariable 'Temperature' 293.15;

@ImposedStrain 'EXY' {0 : 0, 'tmax' : 'em'};
@ImposedStrain<function> 'EXX' '0.0';
@ImposedStrain<function> 'EZZ' '0.0';
@ImposedStrain<function> 'EXZ' '0.0';
@ImposedStrain<function> 'EYZ' '0.0';

@Times{0., 'tmax' in 100};
